OpenVSP model (file version 5), 2 components.
Geometry view with OpenVSP parameter names; values to 6 digits, angles in degrees, lengths in the model's unit.
Overall bounding box: X_Min=0.144289 X_Len=2.19035 Y_Min=-0.2 Y_Len=0.4 Z_Min=0.096005 Z_Len=0.485959

Fuselage "Musetto"
  location (X Y Z) 0.165 0 0.215, rotation 0 0 0
  bounding box size 2.19035 0.4 0.485959
  Design: Length=2.16964
  cross sections:
    n  XLocPercent  YLocPercent  YRotate  ZLocPercent  shape
    0  0            0            0        0            circle Circle_Diameter=0.1
    1  0.16         0            -12      0.0445       ellipse Ellipse_Height=0.3 Ellipse_Width=0.4
    2  0.4          0            -5       0.075        as above
    3  0.744262     0            0        0.1          as above
    4  1            0            0        0.08         ellipse Ellipse_Height=0 Ellipse_Width=0

Mesh "MeshGeom"
  location (X Y Z) 0 0 0, rotation 0 0 0
  triangle mesh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

VSPAERO settings: Sref=0.416 bref=1.3 cref=0.32 Xcg=0.295415 Ycg=3.25546e-08 Zcg=0.305817 AlphaStart=0 AlphaEnd=0 AlphaNpts=1 BetaStart=0 BetaEnd=0 BetaNpts=1 MachStart=0 MachEnd=0 MachNpts=1 ReCref=4e+06 Vinf=100 Rho=0.002377
