OpenVSP model (file version 5), 4 components.
Geometry view with OpenVSP parameter names; values to 6 digits, angles in degrees, lengths in the model's unit.
Overall bounding box: X_Min=-0.0124264 X_Len=0.812426 Y_Min=-0.65 Y_Len=1.3 Z_Min=0.0526033 Z_Len=0.694793

Fuselage "FuselageGeom"
  location (X Y Z) 0 0 0.4, rotation 0 0 0
  bounding box size 0.812426 0.794793 0.694793
  Design: Length=0.8
  cross sections:
    n  XLocPercent  YLocPercent  ZLocPercent  shape
    0  0            0            0            circle Circle_Diameter=0.03
    1  1            0            0            rounded rectangle RoundRectXSec_Radius=0 RoundedRect_Height=0.4 RoundedRect_Width=0.5

Pod "PodGeom", child of "FuselageGeom"
  location (X Y Z) 0.2 0 0.35, rotation 0 0 0
  bounding box size 0.6 0.12 0.12
  Design: FineRatio=10 Length=0.6

Wing "WingGeom_main"
  location (X Y Z) 0.16 0 0.3, rotation 0 0 0
  symmetric about XZ
  bounding box size 0.318737 1.28025 0.167193
  totals: TotalSpan=1.3 TotalProjectedSpan=1.28025 TotalChord=0.32 TotalArea=0.416 TotalAR=3.94 MAC=0.318712
  root: chord 0.32, twist -5.1234, airfoil file "NASA/LANGLEY LS(1)-0417 (GA(W)-1) AIRFOIL"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 BaseThickChord=0.16998 Invert=1 ThickChord=0.16998
  sections:
    n  Span  Root_Chord  Tip_Chord  Area   Sweep  Sweep_Location  Dihedral  Twist  Twist_Location  tip airfoil
    1  0.65  0.32        0.32       0.208  0      0               10        10     0.25            as above

Wing "WingGeom_sec"
  location (X Y Z) 0.4 0 0.35, rotation 0 -5 0
  symmetric about XZ
  bounding box size 0.129539 1.3 0.0200762
  totals: TotalSpan=1.3 TotalProjectedSpan=1.3 TotalChord=0.13 TotalArea=0.169 TotalAR=10 MAC=0.13
  root: chord 0.13, twist 0, airfoil file "CLARK Y AIRFOIL"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 BaseThickChord=0.117018 Invert=1 ThickChord=0.117018
  sections:
    n  Span  Root_Chord  Tip_Chord  Area    Sweep  Sweep_Location  Dihedral  Twist  Twist_Location  tip airfoil
    1  0.65  0.13        0.13       0.0845  0      0               0         0      0.25            as above

VSPAERO settings (reference component "WingGeom_main"): Sref=0.416 bref=1.3 cref=0.32 Xcg=0.295415 Ycg=3.25546e-08 Zcg=0.305817 AlphaStart=0 AlphaEnd=0 AlphaNpts=1 BetaStart=0 BetaEnd=0 BetaNpts=1 MachStart=0 MachEnd=0 MachNpts=1 ReCref=4e+06 Vinf=100 Rho=0.002377
