OpenVSP model (file version 5), 3 components.
Geometry view with OpenVSP parameter names; values to 6 digits, angles in degrees, lengths in the model's unit.
Overall bounding box: X_Min=8.83216e-05 X_Len=1.78628 Y_Min=-1 Y_Len=2 Z_Min=-0.0318182 Z_Len=0.18432

Wing "WingGeom"
  location (X Y Z) 0 0 0, rotation 0 0 0
  symmetric about XZ
  bounding box size 0.29982 2 0.17296
  totals: TotalSpan=2.3 TotalProjectedSpan=2 TotalChord=0.15 TotalArea=0.43 TotalAR=9.30233 MAC=0.208325
  root: chord 0.3, twist -2, NACA 4-series Camber=0 CamberLoc=0.2 ThickChord=0.12
  sections:
    n  Span  Root_Chord  Tip_Chord  Area   Sweep  Sweep_Location  Dihedral  Twist  Twist_Location  tip airfoil
    1  1     0.3         0.1        0.2    10     0               0         -10    0.25            NACA 4-series Camber=0 CamberLoc=0.2 ThickChord=0.1
    2  0.15  0.1         0.1        0.015  0      0               90        0      0.25            NACA 4-series Camber=0 CamberLoc=0.2 ThickChord=0.05

Wing "WingGeom"
  location (X Y Z) 0.1 0 0.05, rotation 0 0 0
  symmetric about XZ
  bounding box size 0.370284 1.6 0.0322595
  totals: TotalSpan=1.6 TotalProjectedSpan=1.6 TotalChord=0.25 TotalArea=0.4 TotalAR=6.4 MAC=0.253309
  root: chord 0.3, twist 0, NACA 5-digit CamberLoc=0.2 IdealCl=0.6 Invert=1 ThickChord=0.1
  sections:
    n  Span  Root_Chord  Tip_Chord  Area  Sweep  Sweep_Location  Dihedral  Twist  Twist_Location  tip airfoil
    1  0.8   0.3         0.2        0.2   12     0               0         -2     0.25            NACA 4-series Camber=0.0389807 CamberLoc=0.2 Invert=1 ThickChord=0.1

Pod "PodGeom"
  location (X Y Z) 0.15 0 0.05, rotation 0 0 0
  bounding box size 1.63636 0.163636 0.163636
  Design: FineRatio=20 Length=1.63636

VSPAERO settings (reference component "WingGeom"): Sref=0.43 bref=2.3 cref=0.15 Xcg=0 Ycg=0 Zcg=0 AlphaStart=0 AlphaEnd=10 AlphaNpts=1 BetaStart=0 BetaEnd=0 BetaNpts=1 MachStart=0 MachEnd=0 MachNpts=1 ReCref=1e+06 Vinf=100 Rho=0.002377
