OpenVSP model (file version 5), 7 components.
Geometry view with OpenVSP parameter names; values to 6 digits, angles in degrees, lengths in the model's unit.
Overall bounding box: X_Min=0.159785 X_Len=2.17486 Y_Min=-0.652538 Y_Len=1.30508 Z_Min=0.253866 Z_Len=0.363098

Wing "WingGeom_main"
  location (X Y Z) 0.16 0 0.3, rotation 0 0 0
  symmetric about XZ
  bounding box size 0.320215 1.30508 0.0387886
  totals: TotalSpan=1.3 TotalProjectedSpan=1.3 TotalChord=0.32 TotalArea=0.416 TotalAR=4.0625 MAC=0.32
  root: chord 0.32, twist 0, NACA 5-digit CamberLoc=0.15 IdealCl=0.3 Invert=1 ThickChord=0.12
  sections:
    n  Span  Root_Chord  Tip_Chord  Area   Sweep  Sweep_Location  Dihedral  Twist  Twist_Location  tip airfoil
    1  0.65  0.32        0.32       0.208  0      0               0         0      0.25            NACA 4-series Camber=0 CamberLoc=0.2 Invert=1 ThickChord=0.08

Wing "WingGeom_sec"
  location (X Y Z) 0.45 0 0.32, rotation 0 -5 0
  symmetric about XZ
  bounding box size 0.128095 1.30304 0.0289792
  totals: TotalSpan=1.3 TotalProjectedSpan=1.3 TotalChord=0.13 TotalArea=0.169 TotalAR=10 MAC=0.13
  root: chord 0.13, twist -5, airfoil file "CLARK Y AIRFOIL"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 BaseThickChord=0.117018 Invert=1 ThickChord=0.117018
  sections:
    n  Span  Root_Chord  Tip_Chord  Area    Sweep  Sweep_Location  Dihedral  Twist  Twist_Location  tip airfoil
    1  0.65  0.13        0.13       0.0845  0      0               0         -5     0.25            as above

Wing "WingGeom_endplate"
  location (X Y Z) 0.16 0.65 0.255, rotation 90 0 0
  symmetric about XZ
  bounding box size 0.45 1.30453 0.152267
  totals: TotalSpan=0.3 TotalProjectedSpan=0.3 TotalChord=0.45 TotalArea=0.135 TotalAR=0.666667 MAC=0.45
  root: chord 0.45, twist 0, NACA 4-series Camber=0 CamberLoc=0.2 Invert=1 ThickChord=0.01
  sections:
    n  Span  Root_Chord  Tip_Chord  Area    Sweep  Sweep_Location  Dihedral  Twist  Twist_Location  tip airfoil
    1  0.15  0.45        0.45       0.0675  0      0               0         0      0.25            as above

Wing "WingGeom_outwash"
  location (X Y Z) 0.17 0.32 0.3, rotation 90 9 0
  symmetric about XZ
  bounding box size 0.0988656 0.671603 0.201998
  totals: TotalSpan=0.4 TotalProjectedSpan=0.4 TotalChord=0.1 TotalArea=0.04 TotalAR=4 MAC=0.1
  root: chord 0.1, twist 0, airfoil file "20-32C AIRFOIL"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 BaseThickChord=0.0799225 ThickChord=0.0799225
  sections:
    n  Span  Root_Chord  Tip_Chord  Area  Sweep  Sweep_Location  Dihedral  Twist  Twist_Location  tip airfoil
    1  0.2   0.1         0.1        0.02  0      0               0         0      0.25            as above

Fuselage "Musetto"
  location (X Y Z) 0.165 0 0.3, rotation 0 0 0
  bounding box size 2.16964 0.3 0.35747
  Design: Length=2.16964
  cross sections:
    n  XLocPercent  YLocPercent  YRotate  ZLocPercent  shape
    0  0            0            0        0            ellipse Ellipse_Height=0 Ellipse_Width=0.05
    1  0.1          0            -12      0.016        ellipse Ellipse_Height=0.08 Ellipse_Width=0.18
    2  0.4          0            -5       0.07         ellipse Ellipse_Height=0.1 Ellipse_Width=0.2
    3  0.744262     0            0        0.1          ellipse Ellipse_Height=0.2 Ellipse_Width=0.3
    4  1            0            0        0.08         ellipse Ellipse_Height=0 Ellipse_Width=0

Wing "WingGeom_outwash2"
  location (X Y Z) 0.26 0.345 0.3, rotation 90 18 0
  symmetric about XZ
  bounding box size 0.095201 0.752108 0.201998
  totals: TotalSpan=0.4 TotalProjectedSpan=0.4 TotalChord=0.1 TotalArea=0.04 TotalAR=4 MAC=0.1
  root: chord 0.1, twist 0, airfoil file "20-32C AIRFOIL"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 BaseThickChord=0.0799225 ThickChord=0.0799225
  sections:
    n  Span  Root_Chord  Tip_Chord  Area  Sweep  Sweep_Location  Dihedral  Twist  Twist_Location  tip airfoil
    1  0.2   0.1         0.1        0.02  0      0               0         0      0.25            as above

Wing "WingGeom_outwash3"
  location (X Y Z) 0.35 0.385 0.3, rotation 90 27 0
  symmetric about XZ
  bounding box size 0.0891922 0.861083 0.201998
  totals: TotalSpan=0.4 TotalProjectedSpan=0.4 TotalChord=0.1 TotalArea=0.04 TotalAR=4 MAC=0.1
  root: chord 0.1, twist 0, airfoil file "20-32C AIRFOIL"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 BaseThickChord=0.0799225 ThickChord=0.0799225
  sections:
    n  Span  Root_Chord  Tip_Chord  Area  Sweep  Sweep_Location  Dihedral  Twist  Twist_Location  tip airfoil
    1  0.2   0.1         0.1        0.02  0      0               0         0      0.25            as above

VSPAERO settings (reference component "WingGeom_main"): Sref=0.416 bref=1.3 cref=0.32 Xcg=0.295415 Ycg=3.25546e-08 Zcg=0.305817 AlphaStart=0 AlphaEnd=0 AlphaNpts=1 BetaStart=0 BetaEnd=0 BetaNpts=1 MachStart=0 MachEnd=0 MachNpts=1 ReCref=4e+06 Vinf=100 Rho=0.002377
