OpenVSP model (file version 5), 10 components.
Geometry view with OpenVSP parameter names; values to 6 digits, angles in degrees, lengths in the model's unit.
Overall bounding box: X_Min=0.144289 X_Len=3.16263 Y_Min=-0.655441 Y_Len=1.31088 Z_Min=0.245 Z_Len=1.08783

Wing "WingGeom_main"
  location (X Y Z) 0.16 0 0.3, rotation 0 0 0
  symmetric about XZ
  bounding box size 0.319806 1.31088 0.0547147
  totals: TotalSpan=1.3 TotalProjectedSpan=1.3 TotalChord=0.32 TotalArea=0.416 TotalAR=4.0625 MAC=0.320003
  root: chord 0.32, twist -2, airfoil file "NASA/LANGLEY LS(1)-0417 (GA(W)-1) AIRFOIL"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 BaseThickChord=0.16998 Invert=1 ThickChord=0.16998
  sections:
    n  Span  Root_Chord  Tip_Chord  Area   Sweep  Sweep_Location  Dihedral  Twist  Twist_Location  tip airfoil
    1  0.65  0.32        0.32       0.208  0      0               0         -2     0.25            as above

Wing "WingGeom_sec"
  location (X Y Z) 0.47 0 0.325, rotation 0 -8 0
  symmetric about XZ
  bounding box size 0.127247 1.30304 0.0326655
  totals: TotalSpan=1.3 TotalProjectedSpan=1.3 TotalChord=0.13 TotalArea=0.169 TotalAR=10 MAC=0.13
  root: chord 0.13, twist -4, airfoil file "CLARK Y AIRFOIL"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 BaseThickChord=0.117018 Invert=1 ThickChord=0.117018
  sections:
    n  Span  Root_Chord  Tip_Chord  Area    Sweep  Sweep_Location  Dihedral  Twist  Twist_Location  tip airfoil
    1  0.65  0.13        0.13       0.0845  0      0               0         -4     0.25            as above

Wing "WingGeom_endplate"
  location (X Y Z) 0.16 0.65 0.255, rotation 90 0 0
  symmetric about XZ
  bounding box size 0.45 1.30453 0.152267
  totals: TotalSpan=0.3 TotalProjectedSpan=0.3 TotalChord=0.45 TotalArea=0.135 TotalAR=0.666667 MAC=0.45
  root: chord 0.45, twist 0, NACA 4-series Camber=0 CamberLoc=0.2 Invert=1 ThickChord=0.01
  sections:
    n  Span  Root_Chord  Tip_Chord  Area    Sweep  Sweep_Location  Dihedral  Twist  Twist_Location  tip airfoil
    1  0.15  0.45        0.45       0.0675  0      0               0         0      0.25            as above

Wing "WingGeom_outwash"
  location (X Y Z) 0.2 0.55 0.3, rotation 90 2.9 0
  symmetric about XZ
  bounding box size 0.219767 1.12226 0.206528
  totals: TotalSpan=0.4 TotalProjectedSpan=0.4 TotalChord=0.22 TotalArea=0.088 TotalAR=1.81818 MAC=0.219786
  root: chord 0.22, twist 0, airfoil file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 BaseThickChord=0.118679 ThickChord=0.118679
  sections:
    n  Span  Root_Chord  Tip_Chord  Area   Sweep  Sweep_Location  Dihedral  Twist  Twist_Location  tip airfoil
    1  0.2   0.22        0.22       0.044  0      0               0         0      0.25            as above

Fuselage "Musetto"
  location (X Y Z) 0.165 0 0.44, rotation 0 0 0
  bounding box size 3.16263 0.8 0.959676
  Design: Length=3
  cross sections:
    n   XLocPercent  YLocPercent  YRotate  ZLocPercent  shape
    0   0            0            0        0            circle Circle_Diameter=0.1
    1   0.115713     0            -15      0.0445       ellipse Ellipse_Height=0.3 Ellipse_Width=0.4
    2   0.289287     0            -7       0.075        as above
    3   0.398793     0            -5       0.0655738    ellipse Ellipse_Height=0.420408 Ellipse_Width=0.4
    4   0.447509     0            0        0.0549852    ellipse Ellipse_Height=0.516987 Ellipse_Width=0.8
    5   0.484625     0            0        0.06         edit curve Width=0.8 Height=0.55515 AbsoluteFlag=0 SymType=1 cubic Bezier points (X Y): 0.5 0, 0.5 -0.276142, 0.276142 -0.5, 0 -0.5, -0.276142 -0.5, -0.5 -0.276142, -0.5 0, -0.5 0.276142, -0.276142 -0.41751, 0 -0.41751, 0.276142 -0.41751, 0.5 0.276142, 0.5 0
    6   0.642117     0            0        0.06         as above
    7   0.770548     0            0        0.06         ellipse Ellipse_Height=0.55515 Ellipse_Width=0.8
    8   0.812865     0            0        0.117039     edit curve Width=0.8 Height=0.975331 AbsoluteFlag=0 SymType=1 cubic Bezier points (X Y): 0.46846 -0.211644, 0.46846 -0.487786, 0.276142 -0.458219, 0 -0.458219, -0.276142 -0.458219, -0.46846 -0.487786, -0.46846 -0.211644, -0.187885 0.059589, -0.276142 0.5, 0 0.5, 0.276142 0.5, 0.187885 0.059589, 0.46846 -0.211644
    9   0.906432     0            16.0714  0.117039     edit curve Width=0.8 Height=0.940743 AbsoluteFlag=0 SymType=1 cubic Bezier points (X Y): 0.46846 -0.211644, 0.46846 -0.487786, 0.276142 -0.458219, 0 -0.458219, -0.276142 -0.458219, -0.46846 -0.487786, -0.46846 -0.211644, -0.187885 0.059589, -0.276142 0.330822, 0 0.330822, 0.276142 0.330822, 0.187885 0.059589, 0.46846 -0.211644
    10  1            0            16.0714  0.08         ellipse Ellipse_Height=0.588571 Ellipse_Width=0.4

Fuselage "rightTyre"
  location (X Y Z) 1.05 0.436 0.45, rotation 0 0 90
  bounding box size 0.41 0.235 0.41
  Design: Length=0.194
  cross sections:
    n  XLocPercent  YLocPercent  ZLocPercent  shape
    0  0            0            0            circle Circle_Diameter=0.41
    1  1            0            0            as above

Fuselage "leftTyre"
  location (X Y Z) 1.05 -0.63 0.45, rotation 0 0 90
  bounding box size 0.41 0.235 0.41
  Design: Length=0.194
  cross sections:
    n  XLocPercent  YLocPercent  ZLocPercent  shape
    0  0            0            0            circle Circle_Diameter=0.41
    1  1            0            0            as above

Human "Pilot"
  location (X Y Z) 2.28261 0 0.6, rotation 0 8.58696 0
  mass: Density=1.12389e-06 Shell_Flag=0 Mass_Area=1 Mass_Prior=0
  Anthropometric: Age=23.5455 AutoDensity=0 BMI=20.7 BMI_pct=0.05 GenderFlag=0 LenUnit=2 Mass=67.068 MassUnit=1 SitFrac=0.497273 Stature=1.8 Stature_pct=0.718397 Volume=0.0596294

Fuselage "rightTyreBack"
  location (X Y Z) 2.85 0.436 0.45, rotation 0 0 90
  bounding box size 0.41 0.235 0.41
  Design: Length=0.194
  cross sections:
    n  XLocPercent  YLocPercent  ZLocPercent  shape
    0  0            0            0            circle Circle_Diameter=0.41
    1  1            0            0            as above

Fuselage "leftTyreBack"
  location (X Y Z) 2.85 -0.63 0.45, rotation 0 0 90
  bounding box size 0.41 0.235 0.41
  Design: Length=0.194
  cross sections:
    n  XLocPercent  YLocPercent  ZLocPercent  shape
    0  0            0            0            circle Circle_Diameter=0.41
    1  1            0            0            as above

VSPAERO settings (reference component "WingGeom_main"): Sref=0.416 bref=1.3 cref=0.32 Xcg=0.295415 Ycg=3.25546e-08 Zcg=0.305817 AlphaStart=0 AlphaEnd=0 AlphaNpts=1 BetaStart=0 BetaEnd=0 BetaNpts=1 MachStart=0 MachEnd=0 MachNpts=1 ReCref=4e+06 Vinf=100 Rho=0.002377
